rmnorm(n, m, A) :=
    v ← rnorm(n, 0, 1)
    L ← cholesky(A)
    v ← L*v + m
    return v
c := 0.2
n := 1000
R := [100^2, 0; 0, 50^2]
g := 9.81
dt := 0.1
Q := dt^2*[32.5^2, 0, 0, 0; 0, 18^2, 0, 0; 0, 0, 0.1^2, 0; 0, 0, 0, 5.6^2]
P0 := [0.0001^2, 0, 0, 0; 0, 0.0001^2, 0, 0; 0, 0, 0.0001^2, 0; 0, 0, 0, 0.0001^2]
ρ := 1.29
s := 0.012
H := [1, 0, 0, 0; 0, 1, 0, 0]
m := 7.05
X0 := [0; 0; π/6; 500] = [0; 0; 0.523599; 500]
F(x) := [x[3]*cos(x[2])*dt; x[3]*sin(x[2])*dt; -g/x[3]*cos(x[2])*dt; (-c*ρ*s*x[3]^2/(2*m) - g*sin(x[2]))*dt]
Φ(x) := identity(4) + dt*[
    0, 0, -x[3]*sin(x[2]), cos(x[2]);
    0, 0, x[3]*cos(x[2]), sin(x[2]);
    0, 0, g/x[3]*sin(x[2]), g*cos(x[2])/x[3]^2;
    0, 0, -g*cos(x[2]), -c*ρ*s*x[3]/m
]
X[:, 0] := rmnorm(4, X0, P0) = [7.33696e-5; 0.000138978; 0.523647; 500]
Y_mod :=
    X_mod[:, 0] ← rmnorm(4, X0, P0)
    v[0] ← rmnorm(2, 0, R)
    Y_mod[:, 0] ← H*X_mod[:, 0] + v[0]
    for i ∈ 1 .. n
        w[i] ← rmnorm(4, 0, Q)
        v[i] ← rmnorm(2, 0, R)
        X_mod[:, i] ← X_mod[:, i - 1] + F(X_mod[:, i - 1]) + w[i]
        Y_mod[:, i] ← H*X_mod[:, i] + v[i]
    return Y_mod
Y_true :=
    X_true[:, 0] ← X0
    Y_true[:, 0] ← H*X_true[:, 0]
    for i ∈ 1 .. n
        X_true[:, i] ← X_true[:, i - 1] + F(X_true[:, i - 1])
        Y_true[:, i] ← H*X_true[:, i]
    return Y_true
Y_mod = [
    -85.4069, 88.331, 85.2478, 301.839, 213.702, 176.754, 107.259, 370.059, 348.369, 452.758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;
    -62.8919, 30.3403, 41.4767, 54.0868, 162.662, 129.583, 136.353, 169.104, 183.355, 157.579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]
Y_true = [
    0, 43.3013, 86.1266, 128.487, 170.392, 211.853, 252.88, 293.481, 333.666, 373.445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;
    0, 25, 49.6283, 73.8921, 97.7986, 121.355, 144.567, 167.441, 189.984, 212.202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]
get_Y :=
    X[:, 0] ← X0
    P[0] ← P0
    for i ∈ 1 .. n
        X_extr[:, i] ← X[:, i - 1] + F(X[:, i - 1])
        P_extr[i] ← Φ(X[:, i - 1])*P[i - 1]*transpose(Φ(X[:, i - 1])) + Q
        K[i] ← P_extr[i]*transpose(H)*geninv(H*P_extr[i]*transpose(H) + R)
        X[:, i] ← X_extr[:, i] + K[i]*(Y_mod[:, i] - H*X_extr[:, i])
        P[i] ← (identity(4) - K[i]*H)*P_extr[i]
        Y[:, i] ← H*X[:, i]
    return Y
get_P :=
    X_p[:, 0] ← X0
    X[:, 0] ← X_mod[:, 0]
    P[0] ← P0
    for i ∈ 1 .. n
        X_p[:, i] ← F(X_p[:, i - 1]) + X_p[:, i - 1]
        X_extr[:, i] ← X_p[:, i] + Φ(X_p[:, i])*(X[:, i - 1] - X_p[:, i - 1])
        P_extr[i] ← Φ(X_p[:, i])*P[i - 1]*transpose(Φ(X_p[:, i])) + Q
        Y_extr[:, i] ← H*X_extr[:, i]
        K[i] ← P_extr[i]*transpose(H)*geninv(H*P_extr[i]*transpose(H) + R)
        X[:, i] ← X_extr[:, i] + K[i]*(Y_mod[:, i] - H*X_p[:, i] - H*(X_extr[:, i] - X_p[:, i]))
        P[i] ← (identity(4) - K[i]*H)*P_extr[i]
        Y[:, i] ← H*X[:, i]
    return P  # error: This variable is undefined.
get_X_p :=
    X_p[:, 0] ← X0
    X[:, 0] ← X_mod[:, 0]
    P[0] ← P0
    for i ∈ 1 .. n
        X_p[:, i] ← F(X_p[:, i - 1]) + X_p[:, i - 1]
        X_extr[:, i] ← X_p[:, i] + Φ(X_p[:, i])*(X[:, i - 1] - X_p[:, i - 1])
        P_extr[i] ← Φ(X_p[:, i])*P[i - 1]*transpose(Φ(X_p[:, i])) + Q
        Y_extr[:, i] ← H*X_extr[:, i]
        K[i] ← P_extr[i]*transpose(H)*geninv(H*P_extr[i]*transpose(H) + R)
        X[:, i] ← X_extr[:, i] + K[i]*(Y_mod[:, i] - H*X_p[:, i] - H*(X_extr[:, i] - X_p[:, i]))
        P[i] ← (identity(4) - K[i]*H)*P_extr[i]
        Y[:, i] ← H*X[:, i]
    return X_p  # error: This variable is undefined.
Y := get_Y = [
    0, 43.3488, 86.1725, 129.089, 171.147, 212.397, 252.471, 293.644, 333.983, 374.952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;
    0, 25.0069, 49.6135, 73.7844, 98.0727, 121.721, 144.935, 167.799, 190.213, 211.005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]
Y_mod = [
    -85.4069, 88.331, 85.2478, 301.839, 213.702, 176.754, 107.259, 370.059, 348.369, 452.758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;
    -62.8919, 30.3403, 41.4767, 54.0868, 162.662, 129.583, 136.353, 169.104, 183.355, 157.579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]
X_p := get_X_p  # error: This variable is undefined.
Y_true = [
    0, 43.3013, 86.1266, 128.487, 170.392, 211.853, 252.88, 293.481, 333.666, 373.445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;
    0, 25, 49.6283, 73.8921, 97.7986, 121.355, 144.567, 167.441, 189.984, 212.202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]
t := 0 .. n - 1
x_coord_true := transpose(Y_true)[:, 0]
y_coord_p := transpose(X_p)[:, 1]  # error: This variable is undefined.
x_coord := transpose(Y)[:, 0]
x_coord_mod := transpose(Y_mod)[:, 0]
y_coord := transpose(Y)[:, 1]
y_coord_true := transpose(Y_true)[:, 1]
y_coord_mod := transpose(Y_mod)[:, 1]
ytime[t] := t*dt
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diff[t] := |Y[:, t] - Y_mod[:, t]|/|Y_mod[:, t]|
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diff = [
    1; 0.485; 0.0863813; 0.567003; 0.288005; 0.16654; 0.838489; 0.187841; 0.0404845; 0.196877
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]
