rmnorm(n, m, A) :=
    v ← rnorm(n, 0, 1)
    L ← cholesky(A)
    v ← L*v + m
    return v
c := 0.2
n := 1000
R := [150^2, 0; 0, 150^2]
g := 9.81
dt := 0.1
Q := dt^2*[32.5^2, 0, 0, 0; 0, 18^2, 0, 0; 0, 0, 0.1^2, 0; 0, 0, 0, 5.6^2]
P0 := [0.0001^2, 0, 0, 0; 0, 0.0001^2, 0, 0; 0, 0, 0.0001^2, 0; 0, 0, 0, 0.0001^2]
ρ := 1.29
s := 0.012
H := [1, 0, 0, 0; 0, 1, 0, 0]
m := 7.05
X0 := [0; 0; π/6; 500] = [0; 0; 0.523599; 500]
F(x) := [x[3]*cos(x[2])*dt; x[3]*sin(x[2])*dt; -g/x[3]*cos(x[2])*dt; (-c*ρ*s*x[3]^2/(2*m) - g*sin(x[2]))*dt]
Φ(x) := identity(4) + dt*[
    0, 0, -x[3]*sin(x[2]), cos(x[2]);
    0, 0, x[3]*cos(x[2]), sin(x[2]);
    0, 0, g/x[3]*sin(x[2]), g*cos(x[2])/x[3]^2;
    0, 0, -g*cos(x[2]), -c*ρ*s*x[3]/m
]
X[:, 0] := rmnorm(4, X0, P0) = [8.38616e-5; 1.10078e-6; 0.523665; 500]
Y_mod :=
    X_mod[:, 0] ← rmnorm(4, X0, P0)
    v[0] ← rmnorm(2, 0, R)
    Y_mod[:, 0] ← H*X_mod[:, 0] + v[0]
    for i ∈ 1 .. n
        w[i] ← rmnorm(4, 0, Q)
        v[i] ← rmnorm(2, 0, R)
        X_mod[:, i] ← X_mod[:, i - 1] + F(X_mod[:, i - 1]) + w[i]
        Y_mod[:, i] ← H*X_mod[:, i] + v[i]
    return Y_mod
Y_true :=
    X_true[:, 0] ← X0
    Y_true[:, 0] ← H*X_true[:, 0]
    for i ∈ 1 .. n
        X_true[:, i] ← X_true[:, i - 1] + F(X_true[:, i - 1])
        Y_true[:, i] ← H*X_true[:, i]
    return Y_true
Y_mod = [
    -67.2926, 245.828, 156.925, 261.406, 150.399, 189.037, 417.784, 166.648, 301.588, 416.911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;
    54.0797, 226.054, -79.7232, 42.6241, 289.786, 244.858, 12.8788, 302.978, 196.138, 137.113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]
Y_true = [
    0, 43.3013, 86.1266, 128.487, 170.392, 211.853, 252.88, 293.481, 333.666, 373.445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;
    0, 25, 49.6283, 73.8921, 97.7986, 121.355, 144.567, 167.441, 189.984, 212.202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]
Y :=
    X[:, 0] ← X0
    P[0] ← P0
    for i ∈ 1 .. n
        X_extr[:, i] ← X[:, i - 1] + F(X[:, i - 1])
        P_extr[i] ← Φ(X[:, i - 1])*P[i - 1]*transpose(Φ(X[:, i - 1])) + Q
        K[i] ← P_extr[i]*transpose(H)*geninv(H*P_extr[i]*transpose(H) + R)
        X[:, i] ← X_extr[:, i] + K[i]*(Y_mod[:, i] - H*X_extr[:, i])
        P[i] ← (identity(4) - K[i]*H)*P_extr[i]
        Y[:, i] ← H*X[:, i]
    return Y
Y_sveta :=
    X_p[:, 0] ← X0
    X[:, 0] ← X0
    P[0] ← P0
    for i ∈ 1 .. n
        X_p[:, i] ← F(X_p[:, i - 1]) + X_p[:, i - 1]
        X_extr[:, i] ← X_p[:, i] + Φ(X_p[:, i])*(X[:, i - 1] - X_p[:, i - 1])
        P_extr[i] ← Φ(X_p[:, i])*P[i - 1]*transpose(Φ(X_p[:, i])) + Q
        Y_extr[:, i] ← H*X_extr[:, i]
        K[i] ← P_extr[i]*transpose(H)*geninv(H*P_extr[i]*transpose(H) + R)
        X[:, i] ← X_extr[:, i] + K[i]*(Y_mod[:, i] - H*X_p[:, i] - H*(X_extr[:, i] - X_p[:, i]))
        P[i] ← (identity(4) - K[i]*H)*P_extr[i]
        Y[:, i] ← H*X[:, i]
    return Y
Y_true = [
    0, 43.3013, 86.1266, 128.487, 170.392, 211.853, 252.88, 293.481, 333.666, 373.445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;
    0, 25, 49.6283, 73.8921, 97.7986, 121.355, 144.567, 167.441, 189.984, 212.202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]
Y_mod = [
    -67.2926, 245.828, 156.925, 261.406, 150.399, 189.037, 417.784, 166.648, 301.588, 416.911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;
    54.0797, 226.054, -79.7232, 42.6241, 289.786, 244.858, 12.8788, 302.978, 196.138, 137.113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]
Y = [
    0, 43.3963, 86.2887, 128.839, 170.696, 212.082, 253.615, 293.724, 333.762, 373.79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;
    0, 25.0289, 49.6186, 73.8633, 97.8991, 121.582, 144.601, 167.745, 190.343, 212.341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]
Y_sveta = [
    0, 43.3963, 86.2887, 128.839, 170.696, 212.082, 253.614, 293.725, 333.764, 373.79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;
    0, 25.0289, 49.6186, 73.8635, 97.8988, 121.58, 144.601, 167.743, 190.34, 212.34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]
t := 0 .. n - 1
time[t] := t*dt
x_coord := transpose(Y)[:, 0]
x_coord_mod := transpose(Y_mod)[:, 0]
x_coord_true := transpose(Y_true)[:, 0]
x_coord_sveta := transpose(Y_sveta)[:, 0]
y_coord := transpose(Y)[:, 1]
y_coord_mod := transpose(Y_mod)[:, 1]
y_coord_true := transpose(Y_true)[:, 1]
y_coord_sveta := transpose(Y_sveta)[:, 1]
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diff[t] := |Y[:, t] - Y_mod[:, t]|/|Y_mod[:, t]|
diff_sveta[t] := |Y_sveta[:, t] - Y_mod[:, t]|/|Y_mod[:, t]|
n_o := norme(diag(diff)) = 2.57628
n_s := norme(diag(diff_sveta)) = 2.57648
|n_o - n_s| = 0.000194659
n_o - n_s = -0.000194659
transpose(diff) = [
    1, 0.854251, 0.837275, 0.514231, 0.591006, 0.405419, 0.503564, 0.536664, 0.0908712, 0.197571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]
transpose(diff_sveta) = [
    1, 0.854251, 0.837275, 0.514232, 0.591007, 0.405422, 0.503566, 0.536671, 0.0908787, 0.197569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]
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