rmnorm(n, m, A) :=
    v ← rnorm(n, 0, 1)
    L ← cholesky(A)
    v ← L*v + m
    return v
c := 0.2
n := 1000
R := [100^2, 0; 0, 50^2]
g := 9.81
dt := 0.25
Q := dt^2*[32.5^2, 0, 0, 0; 0, 18^2, 0, 0; 0, 0, 0.1^2, 0; 0, 0, 0, 5.6^2]
P0 := [0.0001^2, 0, 0, 0; 0, 0.0001^2, 0, 0; 0, 0, 0.0001^2, 0; 0, 0, 0, 0.0001^2]
ρ := 1.29
s := 0.012
H := [1, 0, 0, 0; 0, 1, 0, 0]
m := 7.05
X0 := [0; 0; π/6; 500] = [0; 0; 0.523599; 500]
F(x) := [x[3]*cos(x[2])*dt; x[3]*sin(x[2])*dt; -g/x[3]*cos(x[2])*dt; (-c*ρ*s*x[3]^2/(2*m) - g*sin(x[2]))*dt]
Φ(x) := identity(4) + dt*[
    0, 0, -x[3]*sin(x[2]), cos(x[2]);
    0, 0, x[3]*cos(x[2]), sin(x[2]);
    0, 0, g/x[3]*sin(x[2]), g*cos(x[2])/x[3]^2;
    0, 0, -g*cos(x[2]), -c*ρ*s*x[3]/m
]
X[:, 0] := rmnorm(4, X0, P0) = [5.44878e-5; 6.24333e-5; 0.523602; 500]
Y_mod :=
    X_mod[:, 0] ← rmnorm(4, X0, P0)
    v[0] ← rmnorm(2, 0, R)
    Y_mod[:, 0] ← H*X_mod[:, 0] + v[0]
    for i ∈ 1 .. n
        w[i] ← rmnorm(4, 0, Q)
        v[i] ← rmnorm(2, 0, R)
        X_mod[:, i] ← X_mod[:, i - 1] + F(X_mod[:, i - 1]) + w[i]
        Y_mod[:, i] ← H*X_mod[:, i] + v[i]
    return Y_mod
Y_true :=
    X_true[:, 0] ← X0
    Y_true[:, 0] ← H*X_true[:, 0]
    for i ∈ 1 .. n
        X_true[:, i] ← X_true[:, i - 1] + F(X_true[:, i - 1])
        Y_true[:, i] ← H*X_true[:, i]
    return Y_true
Y_mod = [
    41.9836, 77.7866, 151.33, 399.907, 292.416, 570.686, 473.004, 766.27, 605.574, 1016.26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;
    -22.7953, 142.505, 159.189, 140.97, 264.183, 335.787, 321.771, 445.639, 420.537, 551.771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]
Y_true = [
    0, 108.253, 213.526, 315.988, 415.792, 513.081, 607.986, 700.629, 791.121, 879.567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;
    0, 62.5, 122.685, 180.667, 236.549, 290.427, 342.389, 392.515, 440.88, 487.554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]
Y :=
    X[:, 0] ← X0
    P[0] ← P0
    for i ∈ 1 .. n
        X_extr[:, i] ← X[:, i - 1] + F(X[:, i - 1])
        P_extr[i] ← Φ(X[:, i - 1])*P[i - 1]*transpose(Φ(X[:, i - 1])) + Q
        K[i] ← P_extr[i]*transpose(H)*geninv(H*P_extr[i]*transpose(H) + R)
        X[:, i] ← X_extr[:, i] + K[i]*(Y_mod[:, i] - H*X_extr[:, i])
        P[i] ← (identity(4) - K[i]*H)*P_extr[i]
        Y[:, i] ← H*X[:, i]
    return Y
Y_sveta :=
    X_p[:, 0] ← X0
    X[:, 0] ← X0
    P[0] ← P0
    for i ∈ 1 .. n
        X_p[:, i] ← F(X_p[:, i - 1]) + X_p[:, i - 1]
        X_extr[:, i] ← X_p[:, i] + Φ(X_p[:, i])*(X[:, i - 1] - X_p[:, i - 1])
        P_extr[i] ← Φ(X_p[:, i])*P[i - 1]*transpose(Φ(X_p[:, i])) + Q
        Y_extr[:, i] ← H*X_extr[:, i]
        K[i] ← P_extr[i]*transpose(H)*geninv(H*P_extr[i]*transpose(H) + R)
        X[:, i] ← X_extr[:, i] + K[i]*(Y_mod[:, i] - H*X_p[:, i] - H*(X_extr[:, i] - X_p[:, i]))
        P[i] ← (identity(4) - K[i]*H)*P_extr[i]
        Y[:, i] ← H*X[:, i]
    return Y
Y_true = [
    0, 108.253, 213.526, 315.988, 415.792, 513.081, 607.986, 700.629, 791.121, 879.567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;
    0, 62.5, 122.685, 180.667, 236.549, 290.427, 342.389, 392.515, 440.88, 487.554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]
Y_mod = [
    41.9836, 77.7866, 151.33, 399.907, 292.416, 570.686, 473.004, 766.27, 605.574, 1016.26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;
    -22.7953, 142.505, 159.189, 140.97, 264.183, 335.787, 321.771, 445.639, 420.537, 551.771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]
Y = [
    0, 108.053, 212.453, 316.861, 412.859, 510.693, 600.619, 693.371, 775.262, 867.985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;
    0, 63.1428, 124.017, 180.491, 238.391, 296.252, 347.272, 404.888, 451.956, 507.797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]
Y_sveta = [
    0, 108.053, 212.457, 316.845, 412.885, 510.789, 600.731, 693.605, 775.544, 868.332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;
    0, 63.1428, 124.01, 180.514, 238.351, 296.117, 347.117, 404.629, 451.633, 507.562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]
t := 0 .. n - 1
time[t] := t*dt
x_coord := transpose(Y)[:, 0]
x_coord_mod := transpose(Y_mod)[:, 0]
x_coord_true := transpose(Y_true)[:, 0]
x_coord_sveta := transpose(Y_sveta)[:, 0]
y_coord := transpose(Y)[:, 1]
y_coord_mod := transpose(Y_mod)[:, 1]
y_coord_true := transpose(Y_true)[:, 1]
y_coord_sveta := transpose(Y_sveta)[:, 1]
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diff[t] := |Y[:, t] - Y_mod[:, t]|/|Y_mod[:, t]|
diff_sveta[t] := |Y_sveta[:, t] - Y_mod[:, t]|/|Y_mod[:, t]|
n_o := norme(diag(diff)) = 1.35735
n_s := norme(diag(diff_sveta)) = 1.3575
|n_o - n_s| = 0.000149313
n_o - n_s = -0.000149313
transpose(diff) = [
    1, 0.523169, 0.321068, 0.216897, 0.312558, 0.108508, 0.227483, 0.0942159, 0.234068, 0.133743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]
transpose(diff_sveta) = [
    1, 0.523169, 0.3211, 0.216954, 0.312644, 0.1085, 0.227623, 0.0941278, 0.234364, 0.133513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]
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