rmnorm(n, m, A) :=
    v ← rnorm(n, 0, 1)
    L ← cholesky(A)
    v ← L*v + m
    return v
c := 0.2
n := 1000
R := [50^2, 0; 0, 50^2]
g := 9.81
dt := 0.05
Q := dt^2*[32.5^2, 0, 0, 0; 0, 18^2, 0, 0; 0, 0, 0.1^2, 0; 0, 0, 0, 5.6^2]
P0 := [0.0001^2, 0, 0, 0; 0, 0.0001^2, 0, 0; 0, 0, 0.0001^2, 0; 0, 0, 0, 0.0001^2]
ρ := 1.29
s := 0.012
deg2rad(x) := x*π/180
H := [1, 0, 0, 0; 0, 1, 0, 0]
m := 4.1
F(x) := [x[3]*cos(x[2])*dt; x[3]*sin(x[2])*dt; -g/x[3]*cos(x[2])*dt; (-c*ρ*s*x[3]^2/(2*m) - g*sin(x[2]))*dt]
Φ(x) := identity(4) + dt*[
    0, 0, -x[3]*sin(x[2]), cos(x[2]);
    0, 0, x[3]*cos(x[2]), sin(x[2]);
    0, 0, g/x[3]*sin(x[2]), g*cos(x[2])/x[3]^2;
    0, 0, -g*cos(x[2]), -c*ρ*s*x[3]/m
]
X0 := [0; 0; deg2rad(30); 439] = [0; 0; 0.523599; 439]
Y_mod :=
    X_mod[:, 0] ← rmnorm(4, X0, P0)
    v[0] ← rmnorm(2, 0, R)
    Y_mod[:, 0] ← H*X_mod[:, 0] + v[0]
    for i ∈ 1 .. n
        w[i] ← rmnorm(4, 0, Q)
        v[i] ← rmnorm(2, 0, R)
        X_mod[:, i] ← X_mod[:, i - 1] + F(X_mod[:, i - 1]) + w[i]
        Y_mod[:, i] ← H*X_mod[:, i] + v[i]
    return Y_mod
Y_true :=
    X_true[:, 0] ← X0
    Y_true[:, 0] ← H*X_true[:, 0]
    for i ∈ 1 .. n
        X_true[:, i] ← X_true[:, i - 1] + F(X_true[:, i - 1])
        Y_true[:, i] ← H*X_true[:, i]
    return Y_true
Y_mod = [
    -22.049, 43.0714, 117.703, 51.3254, 137.177, 159.37, 165.169, 108.311, 139.533, 249.963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;
    32.0918, 39.1745, -62.1262, 73.4142, 54.1874, 96.2346, -25.3961, -34.0818, 47.4144, 23.984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]
Y_true = [
    0, 19.0093, 37.8609, 56.5575, 75.1019, 93.4964, 111.744, 129.846, 147.806, 165.626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;
    0, 10.975, 21.8347, 32.5808, 43.215, 53.7391, 64.1545, 74.463, 84.666, 94.7651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]
Y :=
    X[:, 0] ← X0
    P[0] ← P0
    for i ∈ 1 .. n
        X_extr[:, i] ← X[:, i - 1] + F(X[:, i - 1])
        P_extr[i] ← Φ(X[:, i - 1])*P[i - 1]*transpose(Φ(X[:, i - 1])) + Q
        K[i] ← P_extr[i]*transpose(H)*geninv(H*P_extr[i]*transpose(H) + R)
        X[:, i] ← X_extr[:, i] + K[i]*(Y_mod[:, i] - H*X_extr[:, i])
        P[i] ← (identity(4) - K[i]*H)*P_extr[i]
        Y[:, i] ← H*X[:, i]
    return Y
Y_sveta :=
    X_p[:, 0] ← X0
    X[:, 0] ← X0
    P[0] ← P0
    for i ∈ 1 .. n
        X_p[:, i] ← F(X_p[:, i - 1]) + X_p[:, i - 1]
        X_extr[:, i] ← X_p[:, i] + Φ(X_p[:, i])*(X[:, i - 1] - X_p[:, i - 1])
        P_extr[i] ← Φ(X_p[:, i])*P[i - 1]*transpose(Φ(X_p[:, i])) + Q
        Y_extr[:, i] ← H*X_extr[:, i]
        K[i] ← P_extr[i]*transpose(H)*geninv(H*P_extr[i]*transpose(H) + R)
        X[:, i] ← X_extr[:, i] + K[i]*(Y_mod[:, i] - H*X_p[:, i] - H*(X_extr[:, i] - X_p[:, i]))
        P[i] ← (identity(4) - K[i]*H)*P_extr[i]
        Y[:, i] ← H*X[:, i]
    return Y
Y_true = [
    0, 19.0093, 37.8609, 56.5575, 75.1019, 93.4964, 111.744, 129.846, 147.806, 165.626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;
    0, 10.975, 21.8347, 32.5808, 43.215, 53.7391, 64.1545, 74.463, 84.666, 94.7651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]
Y_mod = [
    -22.049, 43.0714, 117.703, 51.3254, 137.177, 159.37, 165.169, 108.311, 139.533, 249.963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;
    32.0918, 39.1745, -62.1262, 73.4142, 54.1874, 96.2346, -25.3961, -34.0818, 47.4144, 23.984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]
Y = [
    0, 19.0346, 38.0547, 56.7341, 75.5386, 94.275, 112.864, 130.822, 148.721, 167.361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;
    0, 10.9841, 21.789, 32.5751, 43.2224, 53.8151, 64.0346, 74.0632, 84.144, 93.9472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]
Y_sveta = [
    0, 19.0346, 38.0547, 56.7341, 75.5386, 94.2749, 112.863, 130.821, 148.72, 167.359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;
    0, 10.9841, 21.789, 32.5751, 43.2224, 53.8152, 64.0351, 74.0642, 84.1454, 93.9501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]
t := 0 .. n - 1
time[t] := t*dt
x_coord := transpose(Y)[:, 0]
x_coord_mod := transpose(Y_mod)[:, 0]
x_coord_true := transpose(Y_true)[:, 0]
x_coord_sveta := transpose(Y_sveta)[:, 0]
y_coord := transpose(Y)[:, 1]
y_coord_mod := transpose(Y_mod)[:, 1]
y_coord_true := transpose(Y_true)[:, 1]
y_coord_sveta := transpose(Y_sveta)[:, 1]
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diff[t] := |Y[:, t] - Y_mod[:, t]|/|Y_mod[:, t]|
diff_sveta[t] := |Y_sveta[:, t] - Y_mod[:, t]|/|Y_mod[:, t]|
n_o := norme(diag(diff)) = 2.4725
n_s := norme(diag(diff_sveta)) = 2.47258
|n_o - n_s| = 8.60646e-5
n_o - n_s = -8.60646e-5
transpose(diff) = [
    1, 0.636303, 0.86929, 0.459895, 0.424472, 0.417338, 0.619973, 0.97284, 0.256914, 0.431082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]
transpose(diff_sveta) = [
    1, 0.636303, 0.86929, 0.459895, 0.424472, 0.417338, 0.619976, 0.972847, 0.256922, 0.431095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]
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