rmnorm(n, m, A) :=
    v ← rnorm(n, 0, 1)
    L ← cholesky(A)
    v ← L*v + m
    return v
c := 0.2
n := 1000
R := [20^2, 0; 0, 20^2]
g := 9.81
dt := 0.1
Q := dt^2*[32.5^2, 0, 0, 0; 0, 18^2, 0, 0; 0, 0, 0.1^2, 0; 0, 0, 0, 5.6^2]
P0 := [0.0001^2, 0, 0, 0; 0, 0.0001^2, 0, 0; 0, 0, 0.0001^2, 0; 0, 0, 0, 0.0001^2]
ρ := 1.29
s := 0.046
deg2rad(x) := x*π/180
H := [1, 0, 0, 0; 0, 1, 0, 0]
m := 4.1
F(x) := [x[3]*cos(x[2])*dt; x[3]*sin(x[2])*dt; -g/x[3]*cos(x[2])*dt; (-c*ρ*s*x[3]^2/(2*m) - g*sin(x[2]))*dt]
Φ(x) := identity(4) + dt*[
    0, 0, -x[3]*sin(x[2]), cos(x[2]);
    0, 0, x[3]*cos(x[2]), sin(x[2]);
    0, 0, g/x[3]*sin(x[2]), g*cos(x[2])/x[3]^2;
    0, 0, -g*cos(x[2]), -c*ρ*s*x[3]/m
]
X0 := [0; 0; deg2rad(30); 439] = [0; 0; 0.523599; 439]
Y_mod :=
    X_mod[:, 0] ← rmnorm(4, X0, P0)
    v[0] ← rmnorm(2, 0, R)
    Y_mod[:, 0] ← H*X_mod[:, 0] + v[0]
    for i ∈ 1 .. n
        w[i] ← rmnorm(4, 0, Q)
        v[i] ← rmnorm(2, 0, R)
        X_mod[:, i] ← X_mod[:, i - 1] + F(X_mod[:, i - 1]) + w[i]
        Y_mod[:, i] ← H*X_mod[:, i] + v[i]
    return Y_mod
Y_true :=
    X_true[:, 0] ← X0
    Y_true[:, 0] ← H*X_true[:, 0]
    for i ∈ 1 .. n
        X_true[:, i] ← X_true[:, i - 1] + F(X_true[:, i - 1])
        Y_true[:, i] ← H*X_true[:, i]
    return Y_true
Y_mod = [
    25.1616, 35.572, 94.1498, 77.7886, 146.051, 183.023, 177.057, 194.382, 267.486, 264.59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;
    10.0044, 36.671, 58.6977, 89.0793, 76.5158, 97.9418, 85.9887, 129.857, 157.106, 169.813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]
Y_true = [
    0, 38.0185, 73.6186, 107.1, 138.711, 168.654, 197.105, 224.209, 250.093, 274.865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;
    0, 21.95, 42.412, 61.5642, 79.5534, 96.5014, 112.511, 127.67, 142.053, 155.724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]
Y :=
    X[:, 0] ← X0
    P[0] ← P0
    for i ∈ 1 .. n
        X_extr[:, i] ← X[:, i - 1] + F(X[:, i - 1])
        P_extr[i] ← Φ(X[:, i - 1])*P[i - 1]*transpose(Φ(X[:, i - 1])) + Q
        K[i] ← P_extr[i]*transpose(H)*geninv(H*P_extr[i]*transpose(H) + R)
        X[:, i] ← X_extr[:, i] + K[i]*(Y_mod[:, i] - H*X_extr[:, i])
        P[i] ← (identity(4) - K[i]*H)*P_extr[i]
        Y[:, i] ← H*X[:, i]
    return Y
Y_sveta :=
    X_p[:, 0] ← X0
    X[:, 0] ← X0
    P[0] ← P0
    for i ∈ 1 .. n
        X_p[:, i] ← F(X_p[:, i - 1]) + X_p[:, i - 1]
        X_extr[:, i] ← X_p[:, i] + Φ(X_p[:, i])*(X[:, i - 1] - X_p[:, i - 1])
        P_extr[i] ← Φ(X_p[:, i])*P[i - 1]*transpose(Φ(X_p[:, i])) + Q
        Y_extr[:, i] ← H*X_extr[:, i]
        K[i] ← P_extr[i]*transpose(H)*geninv(H*P_extr[i]*transpose(H) + R)
        X[:, i] ← X_extr[:, i] + K[i]*(Y_mod[:, i] - H*X_p[:, i] - H*(X_extr[:, i] - X_p[:, i]))
        P[i] ← (identity(4) - K[i]*H)*P_extr[i]
        Y[:, i] ← H*X[:, i]
    return Y
Y_true = [
    0, 38.0185, 73.6186, 107.1, 138.711, 168.654, 197.105, 224.209, 250.093, 274.865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;
    0, 21.95, 42.412, 61.5642, 79.5534, 96.5014, 112.511, 127.67, 142.053, 155.724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]
Y_mod = [
    25.1616, 35.572, 94.1498, 77.7886, 146.051, 183.023, 177.057, 194.382, 267.486, 264.59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;
    10.0044, 36.671, 58.6977, 89.0793, 76.5158, 97.9418, 85.9887, 129.857, 157.106, 169.813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]
Y = [
    0, 37.9556, 74.5755, 105.887, 138.251, 169.735, 195.845, 219.322, 248.063, 271.519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;
    0, 22.0683, 42.7885, 62.6377, 80.5059, 97.4479, 112.086, 127.571, 142.895, 157.798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]
Y_sveta = [
    0, 37.9556, 74.5756, 105.891, 138.255, 169.737, 195.838, 219.326, 248.071, 271.543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;
    0, 22.0683, 42.7884, 62.6306, 80.4987, 97.4438, 112.099, 127.562, 142.878, 157.743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]
t := 0 .. n - 1
time[t] := t*dt
x_coord := transpose(Y)[:, 0]
x_coord_mod := transpose(Y_mod)[:, 0]
x_coord_true := transpose(Y_true)[:, 0]
x_coord_sveta := transpose(Y_sveta)[:, 0]
y_coord := transpose(Y)[:, 1]
y_coord_mod := transpose(Y_mod)[:, 1]
y_coord_true := transpose(Y_true)[:, 1]
y_coord_sveta := transpose(Y_sveta)[:, 1]
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diff[t] := |Y[:, t] - Y_mod[:, t]|/|Y_mod[:, t]|
diff_sveta[t] := |Y_sveta[:, t] - Y_mod[:, t]|/|Y_mod[:, t]|
n_o := norme(diag(diff)) = 1.22222
n_s := norme(diag(diff_sveta)) = 1.22233
|n_o - n_s| = 0.000105103
n_o - n_s = -0.000105103
transpose(diff) = [
    1, 0.28961, 0.227349, 0.326251, 0.0531394, 0.0640541, 0.163371, 0.107134, 0.0775821, 0.0441159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]
transpose(diff_sveta) = [
    1, 0.28961, 0.22735, 0.326317, 0.0530983, 0.0640447, 0.163404, 0.107152, 0.0775947, 0.0443041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]
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