rmnorm(n, m, A) :=
    v ← rnorm(n, 0, 1)
    L ← cholesky(A)
    v ← L*v + m
    return v
c := 0.2
n := 1000
R := [20^2, 0; 0, 20^2]
g := 9.81
dt := 0.1
Q := dt^2*[32.5^2, 0, 0, 0; 0, 18^2, 0, 0; 0, 0, 0.1^2, 0; 0, 0, 0, 5.6^2]
P0 := [0.0001^2, 0, 0, 0; 0, 0.0001^2, 0, 0; 0, 0, 0.0001^2, 0; 0, 0, 0, 0.0001^2]
ρ := 1.29
s := 0.046
deg2rad(x) := x*π/180
H := [1, 0, 0, 0; 0, 1, 0, 0]
m := 4.1
F(x) := [x[3]*cos(x[2])*dt; x[3]*sin(x[2])*dt; -g/x[3]*cos(x[2])*dt; (-c*ρ*s*x[3]^2/(2*m) - g*sin(x[2]))*dt] + x
Φ(x) := identity(4) + dt*[
    0, 0, -x[3]*sin(x[2]), cos(x[2]);
    0, 0, x[3]*cos(x[2]), sin(x[2]);
    0, 0, g/x[3]*sin(x[2]), g*cos(x[2])/x[3]^2;
    0, 0, -g*cos(x[2]), -c*ρ*s*x[3]/m
]
X0 := [0; 0; deg2rad(30); 439] = [0; 0; 0.523599; 439]
Y_mod :=
    X_mod[:, 0] ← rmnorm(4, X0, P0)
    v[0] ← rmnorm(2, 0, R)
    Y_mod[:, 0] ← H*X_mod[:, 0] + v[0]
    for i ∈ 1 .. n
        w[i] ← rmnorm(4, 0, Q)
        v[i] ← rmnorm(2, 0, R)
        X_mod[:, i] ← F(X_mod[:, i - 1]) + w[i]
        Y_mod[:, i] ← H*X_mod[:, i] + v[i]
    return Y_mod
Y_true :=
    X_true[:, 0] ← X0
    Y_true[:, 0] ← H*X_true[:, 0]
    for i ∈ 1 .. n
        X_true[:, i] ← F(X_true[:, i - 1])
        Y_true[:, i] ← H*X_true[:, i]
    return Y_true
Y_mod = [
    -1.53054, -5.2601, 102.89, 110.965, 145.28, 166.336, 162.83, 229.061, 262.165, 300.164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;
    23.0492, 14.4366, 46.751, 27.0933, 98.739, 111.909, 107.182, 154.449, 127.015, 157.406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]
Y_true = [
    0, 38.0185, 73.6186, 107.1, 138.711, 168.654, 197.105, 224.209, 250.093, 274.865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;
    0, 21.95, 42.412, 61.5642, 79.5534, 96.5014, 112.511, 127.67, 142.053, 155.724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]
Y :=
    X[:, 0] ← X0
    P[0] ← P0
    for i ∈ 1 .. n
        X_extr[:, i] ← F(X[:, i - 1])
        P_extr[i] ← Φ(X[:, i - 1])*P[i - 1]*transpose(Φ(X[:, i - 1])) + Q
        K[i] ← P_extr[i]*transpose(H)*geninv(H*P_extr[i]*transpose(H) + R)
        X[:, i] ← X_extr[:, i] + K[i]*(Y_mod[:, i] - H*X_extr[:, i])
        P[i] ← (identity(4) - K[i]*H)*P_extr[i]
        Y[:, i] ← H*X[:, i]
    return Y
Y_sveta :=
    X_p[:, 0] ← X0
    X[:, 0] ← X0
    P[0] ← P0
    for i ∈ 1 .. n
        X_p[:, i] ← F(X_p[:, i - 1])
        X_extr[:, i] ← X_p[:, i] + Φ(X_p[:, i])*(X[:, i - 1] - X_p[:, i - 1])
        P_extr[i] ← Φ(X_p[:, i])*P[i - 1]*transpose(Φ(X_p[:, i])) + Q
        Y_extr[:, i] ← H*X_extr[:, i]
        K[i] ← P_extr[i]*transpose(H)*geninv(H*P_extr[i]*transpose(H) + R)
        X[:, i] ← X_extr[:, i] + K[i]*(Y_mod[:, i] - H*X_p[:, i] - H*(X_extr[:, i] - X_p[:, i]))
        P[i] ← (identity(4) - K[i]*H)*P_extr[i]
        Y[:, i] ← H*X[:, i]
    return Y
Y_true = [
    0, 38.0185, 73.6186, 107.1, 138.711, 168.654, 197.105, 224.209, 250.093, 274.865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;
    0, 21.95, 42.412, 61.5642, 79.5534, 96.5014, 112.511, 127.67, 142.053, 155.724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]
Y_mod = [
    -1.53054, -5.2601, 102.89, 110.965, 145.28, 166.336, 162.83, 229.061, 262.165, 300.164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;
    23.0492, 14.4366, 46.751, 27.0933, 98.739, 111.909, 107.182, 154.449, 127.015, 157.406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]
Y = [
    0, 36.9051, 74.0131, 107.769, 139.888, 169.418, 193.778, 221.707, 249.641, 278.008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;
    0, 21.8896, 42.4177, 60.7087, 79.3386, 96.9769, 112.877, 129.732, 142.838, 156.339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]
Y_sveta = [
    0, 36.9051, 74.0128, 107.765, 139.886, 169.423, 193.789, 221.735, 249.65, 278.007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;
    0, 21.8896, 42.4182, 60.7151, 79.3419, 96.9689, 112.855, 129.674, 142.817, 156.34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]
t := 0 .. n - 1
time[t] := t*dt
x_coord := transpose(Y)[:, 0]
x_coord_mod := transpose(Y_mod)[:, 0]
x_coord_true := transpose(Y_true)[:, 0]
x_coord_sveta := transpose(Y_sveta)[:, 0]
y_coord := transpose(Y)[:, 1]
y_coord_mod := transpose(Y_mod)[:, 1]
y_coord_true := transpose(Y_true)[:, 1]
y_coord_sveta := transpose(Y_sveta)[:, 1]
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diff[t] := |Y[:, t] - Y_mod[:, t]|/|Y_mod[:, t]|
diff_sveta[t] := |Y_sveta[:, t] - Y_mod[:, t]|/|Y_mod[:, t]|
n_o := norme(diag(diff)) = 3.02531
n_s := norme(diag(diff_sveta)) = 3.02534
|n_o - n_s| = 3.34023e-5
n_o - n_s = -3.34023e-5
transpose(diff) = [
    1, 2.78678, 0.258378, 0.295619, 0.114631, 0.0760534, 0.161419, 0.0933429, 0.06927, 0.0654461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]
transpose(diff_sveta) = [
    1, 2.78678, 0.25838, 0.295678, 0.114616, 0.0760966, 0.161454, 0.0935149, 0.069193, 0.0654499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]
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