rmnorm(n, m, A) :=
    v ← rnorm(n, 0, 1)
    L ← cholesky(A)
    v ← L*v + m
    return v
c := 0.2
n := 200
R := [20^2, 0; 0, 20^2]
g := 9.81
dt := 0.1
Q := dt^2*[32.5^2, 0, 0, 0; 0, 18^2, 0, 0; 0, 0, 0.1^2, 0; 0, 0, 0, 5.6^2]
P0 := [0.0001^2, 0, 0, 0; 0, 0.0001^2, 0, 0; 0, 0, 0.0001^2, 0; 0, 0, 0, 0.0001^2]
ρ := 1.29
s := 0.046
deg2rad(x) := x*π/180
H := [1, 0, 0, 0; 0, 1, 0, 0]
m := 4.1
X0 := [0; 0; deg2rad(30); 439] = [0; 0; 0.523599; 439]
F(x) := [x[3]*cos(x[2])*dt; x[3]*sin(x[2])*dt; -g/x[3]*cos(x[2])*dt; (-c*ρ*s*x[3]^2/(2*m) - g*sin(x[2]))*dt] + x
Φ(x) := identity(4) + dt*[
    0, 0, -x[3]*sin(x[2]), cos(x[2]);
    0, 0, x[3]*cos(x[2]), sin(x[2]);
    0, 0, g/x[3]*sin(x[2]), g*cos(x[2])/x[3]^2;
    0, 0, -g*cos(x[2]), -c*ρ*s*x[3]/m
]
X_mod0 := rmnorm(4, X0, P0) = [8.30664e-6; 0.000123268; 0.523629; 439]
Y_mod :=
    X_mod[:, 0] ← X_mod0
    v[0] ← rmnorm(2, 0, R)
    Y_mod[:, 0] ← H*X_mod[:, 0] + v[0]
    for i ∈ 1 .. n
        w[i] ← rmnorm(4, 0, Q)
        v[i] ← rmnorm(2, 0, R)
        X_mod[:, i] ← F(X_mod[:, i - 1]) + w[i]
        Y_mod[:, i] ← H*X_mod[:, i] + v[i]
    return Y_mod
Y_true :=
    X_true[:, 0] ← X0
    Y_true[:, 0] ← H*X_true[:, 0]
    for i ∈ 1 .. n
        X_true[:, i] ← F(X_true[:, i - 1])
        Y_true[:, i] ← H*X_true[:, i]
    return Y_true
Y_mod_noerry :=
    X_mod[:, 0] ← X_mod0
    Y_mod_noerry[:, 0] ← H*X_mod[:, 0]
    for i ∈ 1 .. n
        w[i] ← rmnorm(4, 0, Q)
        X_mod[:, i] ← F(X_mod[:, i - 1]) + w[i]
        Y_mod_noerry[:, i] ← H*X_mod[:, i]
    return Y_mod_noerry
Y_true = [
    0, 38.0185, 73.6186, 107.1, 138.711, 168.654, 197.105, 224.209, 250.093, 274.865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;
    0, 21.95, 42.412, 61.5642, 79.5534, 96.5014, 112.511, 127.67, 142.053, 155.724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]
Y_mod = [
    7.73858, 18.1452, 65.6142, 91.2622, 134.702, 152.215, 202.268, 213.304, 204.695, 236.329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;
    -18.9887, 3.3197, 58.1166, 45.8349, 83.923, 68.984, 120.201, 158.106, 145.541, 124.727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]
Y_mod_noerry = [
    8.30664e-6, 33.9303, 67.4657, 103.274, 137.78, 172.862, 198.867, 229.139, 256.861, 284.612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;
    0.000123268, 25.4975, 46.2668, 66.7349, 86.6867, 101.888, 120.589, 136.666, 151.435, 162.646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]
Y :=
    X[:, 0] ← X0
    P[0] ← P0
    for i ∈ 1 .. n
        X_extr[:, i] ← F(X[:, i - 1])
        P_extr[i] ← Φ(X[:, i - 1])*P[i - 1]*transpose(Φ(X[:, i - 1])) + Q
        K[i] ← P_extr[i]*transpose(H)*geninv(H*P_extr[i]*transpose(H) + R)
        X[:, i] ← X_extr[:, i] + K[i]*(Y_mod[:, i] - H*X_extr[:, i])
        P[i] ← (identity(4) - K[i]*H)*P_extr[i]
        Y[:, i] ← H*X[:, i]
    return Y
Y_sveta :=
    X_p[:, 0] ← X0
    X[:, 0] ← X0
    P[0] ← P0
    for i ∈ 1 .. n
        X_p[:, i] ← F(X_p[:, i - 1])
        X_extr[:, i] ← X_p[:, i] + Φ(X_p[:, i])*(X[:, i - 1] - X_p[:, i - 1])
        P_extr[i] ← Φ(X_p[:, i])*P[i - 1]*transpose(Φ(X_p[:, i])) + Q
        Y_extr[:, i] ← H*X_extr[:, i]
        K[i] ← P_extr[i]*transpose(H)*geninv(H*P_extr[i]*transpose(H) + R)
        X[:, i] ← X_extr[:, i] + K[i]*(Y_mod[:, i] - H*X_p[:, i] - H*(X_extr[:, i] - X_p[:, i]))
        P[i] ← (identity(4) - K[i]*H)*P_extr[i]
        Y[:, i] ← H*X[:, i]
    return Y
Y_true = [
    0, 38.0185, 73.6186, 107.1, 138.711, 168.654, 197.105, 224.209, 250.093, 274.865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;
    0, 21.95, 42.412, 61.5642, 79.5534, 96.5014, 112.511, 127.67, 142.053, 155.724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]
Y_mod_noerry = [
    8.30664e-6, 33.9303, 67.4657, 103.274, 137.78, 172.862, 198.867, 229.139, 256.861, 284.612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;
    0.000123268, 25.4975, 46.2668, 66.7349, 86.6867, 101.888, 120.589, 136.666, 151.435, 162.646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]
Y_mod = [
    7.73858, 18.1452, 65.6142, 91.2622, 134.702, 152.215, 202.268, 213.304, 204.695, 236.329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;
    -18.9887, 3.3197, 58.1166, 45.8349, 83.923, 68.984, 120.201, 158.106, 145.541, 124.727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]
Y = [
    0, 37.5072, 72.7327, 105.161, 136.578, 165.108, 194.55, 220.386, 240.601, 261.553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;
    0, 21.8003, 42.5202, 61.2962, 79.4461, 95.246, 111.662, 128.871, 143.886, 155.279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]
Y_sveta = [
    0, 37.5072, 72.7331, 105.161, 136.579, 165.102, 194.546, 220.406, 240.641, 261.575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;
    0, 21.8003, 42.5195, 61.296, 79.4438, 95.2564, 111.67, 128.83, 143.801, 155.227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]
t := 0 .. n - 1
time[t] := t*dt
x_coord := transpose(Y)[:, 0]
x_coord_mod := transpose(Y_mod)[:, 0]
x_coord_true := transpose(Y_true)[:, 0]
x_coord_sveta := transpose(Y_sveta)[:, 0]
y_coord := transpose(Y)[:, 1]
y_coord_mod := transpose(Y_mod)[:, 1]
y_coord_true := transpose(Y_true)[:, 1]
y_coord_sveta := transpose(Y_sveta)[:, 1]
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diff[t] := |Y[:, t] - Y_mod[:, t]|/|Y_mod[:, t]|
diff_sveta[t] := |Y_sveta[:, t] - Y_mod[:, t]|/|Y_mod[:, t]|
n_o := norme(diag(diff)) = 1.84477
n_s := norme(diag(diff_sveta)) = 1.84484
|n_o - n_s| = 6.68425e-5
n_o - n_s = -6.68425e-5
transpose(diff) = [
    1, 1.45102, 0.195595, 0.203574, 0.0305855, 0.175063, 0.0489187, 0.113294, 0.143114, 0.148262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]
transpose(diff_sveta) = [
    1, 1.45102, 0.195604, 0.203573, 0.0306019, 0.175104, 0.0489049, 0.113463, 0.143288, 0.148165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]
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diff[t] := |Y[:, t] - Y_mod_noerry[:, t]|/|Y_mod_noerry[:, t]|
diff_sveta[t] := |Y_sveta[:, t] - Y_mod_noerry[:, t]|/|Y_mod_noerry[:, t]|
n_o := norme(diag(diff)) = 1.21
n_s := norme(diag(diff_sveta)) = 1.21025
|n_o - n_s| = 0.000256112
n_o - n_s = -0.000256112
n_o/n_s = 0.999788
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