rmnorm(n, m, A) :=
    v ← rnorm(n, 0, 1)
    L ← cholesky(A)
    v ← L*v + m
    return v
c := 0.2
n := 2000
R := [20^2, 0; 0, 20^2]
g := 9.81
dt := 0.1
Q := dt^2*[32.5^2, 0, 0, 0; 0, 18^2, 0, 0; 0, 0, 0.1^2, 0; 0, 0, 0, 5.6^2]
P0 := [0.0001^2, 0, 0, 0; 0, 0.0001^2, 0, 0; 0, 0, 0.0001^2, 0; 0, 0, 0, 0.0001^2]
ρ := 1.29
s := 0.046
deg2rad(x) := x*π/180
H := [1, 0, 0, 0; 0, 1, 0, 0]
m := 4.1
X0 := [0; 0; deg2rad(30); 439] = [0; 0; 0.523599; 439]
F(x) := [x[3]*cos(x[2])*dt; x[3]*sin(x[2])*dt; -g/x[3]*cos(x[2])*dt; (-c*ρ*s*x[3]^2/(2*m) - g*sin(x[2]))*dt] + x
Φ(x) := identity(4) + dt*[
    0, 0, -x[3]*sin(x[2]), cos(x[2]);
    0, 0, x[3]*cos(x[2]), sin(x[2]);
    0, 0, g/x[3]*sin(x[2]), g*cos(x[2])/x[3]^2;
    0, 0, -g*cos(x[2]), -c*ρ*s*x[3]/m
]
X_mod0 := rmnorm(4, X0, P0) = [-4.38971e-5; -6.79406e-5; 0.523551; 439]
Y_mod :=
    X_mod[:, 0] ← X_mod0
    v[0] ← rmnorm(2, 0, R)
    Y_mod[:, 0] ← H*X_mod[:, 0] + v[0]
    for i ∈ 1 .. n
        w[i] ← rmnorm(4, 0, Q)
        v[i] ← rmnorm(2, 0, R)
        X_mod[:, i] ← F(X_mod[:, i - 1]) + w[i]
        Y_mod[:, i] ← H*X_mod[:, i] + v[i]
    return Y_mod
Y_true :=
    X_true[:, 0] ← X0
    Y_true[:, 0] ← H*X_true[:, 0]
    for i ∈ 1 .. n
        X_true[:, i] ← F(X_true[:, i - 1])
        Y_true[:, i] ← H*X_true[:, i]
    return Y_true
Y_mod = [
    -33.7137, 57.3302, 60.6743, 119.651, 162.474, 136.937, 183.65, 233.253, 231.291, 244.847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;
    0.870538, 40.1943, 59.3536, 58.9192, 102.065, 99.1791, 100.246, 130.338, 206.315, 136.089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]
Y_true = [
    0, 38.0185, 73.6186, 107.1, 138.711, 168.654, 197.105, 224.209, 250.093, 274.865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;
    0, 21.95, 42.412, 61.5642, 79.5534, 96.5014, 112.511, 127.67, 142.053, 155.724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]
Y :=
    X[:, 0] ← X0
    P[0] ← P0
    for i ∈ 1 .. n
        X_extr[:, i] ← F(X[:, i - 1])
        P_extr[i] ← Φ(X[:, i - 1])*P[i - 1]*transpose(Φ(X[:, i - 1])) + Q
        K[i] ← P_extr[i]*transpose(H)*geninv(H*P_extr[i]*transpose(H) + R)
        X[:, i] ← X_extr[:, i] + K[i]*(Y_mod[:, i] - H*X_extr[:, i])
        P[i] ← (identity(4) - K[i]*H)*P_extr[i]
        Y[:, i] ← H*X[:, i]
    return Y
Y_sveta :=
    X_p[:, 0] ← X0
    X[:, 0] ← X0
    P[0] ← P0
    for i ∈ 1 .. n
        X_p[:, i] ← F(X_p[:, i - 1])
        X_extr[:, i] ← X_p[:, i] + Φ(X_p[:, i - 1])*(X[:, i - 1] - X_p[:, i - 1])
        P_extr[i] ← Φ(X_p[:, i - 1])*P[i - 1]*transpose(Φ(X_p[:, i - 1])) + Q
        Y_extr[:, i] ← H*X_extr[:, i]
        K[i] ← P_extr[i]*transpose(H)*geninv(H*P_extr[i]*transpose(H) + R)
        X[:, i] ← X_extr[:, i] + K[i]*(Y_mod[:, i] - H*X_p[:, i] - H*(X_extr[:, i] - X_p[:, i]))
        P[i] ← (identity(4) - K[i]*H)*P_extr[i]
        Y[:, i] ← H*X[:, i]
    return Y
Y_true = [
    0, 38.0185, 73.6186, 107.1, 138.711, 168.654, 197.105, 224.209, 250.093, 274.865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;
    0, 21.95, 42.412, 61.5642, 79.5534, 96.5014, 112.511, 127.67, 142.053, 155.724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]
Y_mod = [
    -33.7137, 57.3302, 60.6743, 119.651, 162.474, 136.937, 183.65, 233.253, 231.291, 244.847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;
    0.870538, 40.1943, 59.3536, 58.9192, 102.065, 99.1791, 100.246, 130.338, 206.315, 136.089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]
Y = [
    0, 38.5153, 73.4453, 107.829, 141.46, 167.783, 194.8, 223.317, 246.216, 267.438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;
    0, 22.0966, 42.8327, 61.9065, 80.6085, 97.7523, 113.144, 128.381, 147.663, 159.775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]
Y_sveta = [
    0, 38.5153, 73.4453, 107.829, 141.46, 167.783, 194.8, 223.317, 246.217, 267.441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;
    0, 22.0966, 42.8327, 61.9065, 80.6085, 97.7523, 113.144, 128.381, 147.664, 159.773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]
t := 0 .. n - 1
time[t] := t*dt
x_coord := transpose(Y)[:, 0]
x_coord_mod := transpose(Y_mod)[:, 0]
x_coord_true := transpose(Y_true)[:, 0]
x_coord_sveta := transpose(Y_sveta)[:, 0]
y_coord := transpose(Y)[:, 1]
y_coord_mod := transpose(Y_mod)[:, 1]
y_coord_true := transpose(Y_true)[:, 1]
y_coord_sveta := transpose(Y_sveta)[:, 1]
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diff[t] := |Y[:, t] - Y_mod[:, t]|/|Y_mod[:, t]|
diff_sveta[t] := |Y_sveta[:, t] - Y_mod[:, t]|/|Y_mod[:, t]|
n_o := norme(diag(diff)) = 1.25076
n_s := norme(diag(diff_sveta)) = 1.25078
|n_o - n_s| = 1.45229e-5
n_o - n_s = -1.45229e-5
transpose(diff) = [
    1, 0.372855, 0.246019, 0.0914255, 0.156524, 0.182629, 0.0814843, 0.0379017, 0.195269, 0.116847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]
transpose(diff_sveta) = [
    1, 0.372855, 0.246019, 0.0914255, 0.156524, 0.18263, 0.0814841, 0.0379016, 0.195267, 0.11685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]
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P :=
    X[:, 0] ← X0
    P[0] ← P0
    for i ∈ 1 .. n
        X_extr[:, i] ← F(X[:, i - 1])
        P_extr[i] ← Φ(X[:, i - 1])*P[i - 1]*transpose(Φ(X[:, i - 1])) + Q
        K[i] ← P_extr[i]*transpose(H)*geninv(H*P_extr[i]*transpose(H) + R)
        X[:, i] ← X_extr[:, i] + K[i]*(Y_mod[:, i] - H*X_extr[:, i])
        P[i] ← (identity(4) - K[i]*H)*P_extr[i]
        Y[:, i] ← H*X[:, i]
    return P
P_sveta :=
    X_p[:, 0] ← X0
    X[:, 0] ← X0
    P[0] ← P0
    for i ∈ 1 .. n
        X_p[:, i] ← F(X_p[:, i - 1])
        X_extr[:, i] ← X_p[:, i] + Φ(X_p[:, i - 1])*(X[:, i - 1] - X_p[:, i - 1])
        P_extr[i] ← Φ(X_p[:, i - 1])*P[i - 1]*transpose(Φ(X_p[:, i - 1])) + Q
        Y_extr[:, i] ← H*X_extr[:, i]
        K[i] ← P_extr[i]*transpose(H)*geninv(H*P_extr[i]*transpose(H) + R)
        X[:, i] ← X_extr[:, i] + K[i]*(Y_mod[:, i] - H*X_p[:, i] - H*(X_extr[:, i] - X_p[:, i]))
        P[i] ← (identity(4) - K[i]*H)*P_extr[i]
        Y[:, i] ← H*X[:, i]
    return P
get_variance(P) :=
    for i ∈ 0 .. last(P)
        sum[i] ← norme(diag(diag(P[i])))
    return sum
norme(diag(diag(P0))) = 2e-8
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