rmnorm(n, m, A) :=
    v ← rnorm(n, 0, 1)
    L ← cholesky(A)
    v ← L*v + m
    return v
c := 0.2
n := 2000
R := [20^2, 0; 0, 20^2]
g := 9.81
dt := 0.01
Q := dt^2*[32.5^2, 0, 0, 0; 0, 18^2, 0, 0; 0, 0, 0.1^2, 0; 0, 0, 0, 5.6^2]
P0 := [0.0001^2, 0, 0, 0; 0, 0.0001^2, 0, 0; 0, 0, 0.0001^2, 0; 0, 0, 0, 0.0001^2]
ρ := 1.29
s := 0.046
deg2rad(x) := x*π/180
H := [1, 0, 0, 0; 0, 1, 0, 0]
m := 4.1
R := R
X0 := [0; 0; deg2rad(30); 439] = [0; 0; 0.523599; 439]
P0 := diag([P0[0, 0]; P0[1, 1]; 0.1; 0.1])
F(x) := [x[3]*cos(x[2])*dt; x[3]*sin(x[2])*dt; -g/x[3]*cos(x[2])*dt; (-c*ρ*s*x[3]^2/(2*m) - g*sin(x[2]))*dt] + x
Φ(x) := identity(4) + dt*[
    0, 0, -x[3]*sin(x[2]), cos(x[2]);
    0, 0, x[3]*cos(x[2]), sin(x[2]);
    0, 0, g/x[3]*sin(x[2]), g*cos(x[2])/x[3]^2;
    0, 0, -g*cos(x[2]), -c*ρ*s*x[3]/m
]
X_mod0 := rmnorm(4, X0, P0) = [3.10933e-5; 2.33188e-5; 1.16825; 439.08]
Q := dt^2*diag([32.5^2; 18^2; 8^2; 50^2])
Y_mod :=
    X_mod[:, 0] ← X_mod0
    v[0] ← rmnorm(2, 0, R)
    Y_mod[:, 0] ← H*X_mod[:, 0] + v[0]
    for i ∈ 1 .. n
        w[i] ← rmnorm(4, 0, Q)
        v[i] ← rmnorm(2, 0, R)
        X_mod[:, i] ← F(X_mod[:, i - 1]) + w[i]
        Y_mod[:, i] ← H*X_mod[:, i] + v[i]
    return Y_mod
Y_true :=
    X_true[:, 0] ← X0
    Y_true[:, 0] ← H*X_true[:, 0]
    for i ∈ 1 .. n
        X_true[:, i] ← F(X_true[:, i - 1])
        Y_true[:, i] ← H*X_true[:, i]
    return Y_true
Y_mod = [
    9.15328, -27.6525, 17.6551, -3.36426, 19.8625, 26.7462, 26.1413, -20.4801, 26.6722, -15.1103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;
    2.80269, 1.93604, 29.818, 19.6069, 9.18005, 43.1293, 33.5675, 32.7084, 33.4727, 34.7093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]
Y_true = [
    0, 3.80185, 7.57954, 11.3334, 15.0637, 18.7707, 22.4548, 26.1162, 29.7553, 33.3722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;
    0, 2.195, 4.37508, 6.54042, 8.6912, 10.8276, 12.9498, 15.058, 17.1522, 19.2328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]
Y :=
    X[:, 0] ← X0
    P[0] ← P0
    for i ∈ 1 .. n
        X_extr[:, i] ← F(X[:, i - 1])
        P_extr[i] ← Φ(X[:, i - 1])*P[i - 1]*transpose(Φ(X[:, i - 1])) + Q
        K[i] ← P_extr[i]*transpose(H)*geninv(H*P_extr[i]*transpose(H) + R)
        X[:, i] ← X_extr[:, i] + K[i]*(Y_mod[:, i] - H*X_extr[:, i])
        P[i] ← (identity(4) - K[i]*H)*P_extr[i]
        Y[:, i] ← H*X[:, i]
    return Y
Y_sveta :=
    X_p[:, 0] ← X0
    X[:, 0] ← X0
    P[0] ← P0
    for i ∈ 1 .. n
        X_p[:, i] ← F(X_p[:, i - 1])
        X_extr[:, i] ← X_p[:, i] + Φ(X_p[:, i - 1])*(X[:, i - 1] - X_p[:, i - 1])
        P_extr[i] ← Φ(X_p[:, i - 1])*P[i - 1]*transpose(Φ(X_p[:, i - 1])) + Q
        Y_extr[:, i] ← H*X_extr[:, i]
        K[i] ← P_extr[i]*transpose(H)*geninv(H*P_extr[i]*transpose(H) + R)
        X[:, i] ← X_extr[:, i] + K[i]*(Y_mod[:, i] - H*X_p[:, i] - H*(X_extr[:, i] - X_p[:, i]))
        P[i] ← (identity(4) - K[i]*H)*P_extr[i]
        Y[:, i] ← H*X[:, i]
    return Y
Y_true = [
    0, 3.80185, 7.57954, 11.3334, 15.0637, 18.7707, 22.4548, 26.1162, 29.7553, 33.3722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;
    0, 2.195, 4.37508, 6.54042, 8.6912, 10.8276, 12.9498, 15.058, 17.1522, 19.2328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]
Y_mod = [
    9.15328, -27.6525, 17.6551, -3.36426, 19.8625, 26.7462, 26.1413, -20.4801, 26.6722, -15.1103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;
    2.80269, 1.93604, 29.818, 19.6069, 9.18005, 43.1293, 33.5675, 32.7084, 33.4727, 34.7093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]
Y = [
    0, 3.7564, 7.34156, 10.5723, 14.1973, 16.5798, 19.083, 19.0464, 21.4327, 20.6922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;
    0, 2.25933, 4.77974, 7.78671, 10.1021, 14.2977, 18.1308, 25.1889, 28.6855, 35.6489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]
Y_sveta = [
    0, 3.7564, 7.34267, 10.5962, 14.2261, 16.6545, 19.2314, 19.9752, 22.5955, 23.3448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;
    0, 2.25933, 4.78447, 7.80038, 10.1349, 14.5227, 18.5912, 25.6371, 29.5144, 36.4162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]
t := 0 .. 300
time[t] := t*dt
x_coord := transpose(Y)[:, 0]
x_coord_mod := transpose(Y_mod)[:, 0]
x_coord_true := transpose(Y_true)[:, 0]
x_coord_sveta := transpose(Y_sveta)[:, 0]
y_coord := transpose(Y)[:, 1]
y_coord_mod := transpose(Y_mod)[:, 1]
y_coord_true := transpose(Y_true)[:, 1]
y_coord_sveta := transpose(Y_sveta)[:, 1]
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diff[t] := |Y[:, t] - Y_mod[:, t]|/|Y_mod[:, t]|
diff_sveta[t] := |Y_sveta[:, t] - Y_mod[:, t]|/|Y_mod[:, t]|
n_o := norme(diag(diff)) = 4.57931
n_s := norme(diag(diff_sveta)) = 5.50316
|n_o - n_s| = 0.923848
n_o - n_s = -0.923848
transpose(diff) = [
    1, 1.13313, 0.781444, 0.918601, 0.262315, 0.602401, 0.398956, 1.04261, 0.165823, 0.946089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]
transpose(diff_sveta) = [
    1, 1.13313, 0.781306, 0.919073, 0.261262, 0.59773, 0.387666, 1.0642, 0.132764, 1.01683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]
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P :=
    X[:, 0] ← X0
    P[0] ← P0
    for i ∈ 1 .. n
        X_extr[:, i] ← F(X[:, i - 1])
        P_extr[i] ← Φ(X[:, i - 1])*P[i - 1]*transpose(Φ(X[:, i - 1])) + Q
        K[i] ← P_extr[i]*transpose(H)*geninv(H*P_extr[i]*transpose(H) + R)
        X[:, i] ← X_extr[:, i] + K[i]*(Y_mod[:, i] - H*X_extr[:, i])
        P[i] ← (identity(4) - K[i]*H)*P_extr[i]
        Y[:, i] ← H*X[:, i]
    return P
P_sveta :=
    X_p[:, 0] ← X0
    X[:, 0] ← X0
    P[0] ← P0
    for i ∈ 1 .. n
        X_p[:, i] ← F(X_p[:, i - 1])
        X_extr[:, i] ← X_p[:, i] + Φ(X_p[:, i - 1])*(X[:, i - 1] - X_p[:, i - 1])
        P_extr[i] ← Φ(X_p[:, i - 1])*P[i - 1]*transpose(Φ(X_p[:, i - 1])) + Q
        Y_extr[:, i] ← H*X_extr[:, i]
        K[i] ← P_extr[i]*transpose(H)*geninv(H*P_extr[i]*transpose(H) + R)
        X[:, i] ← X_extr[:, i] + K[i]*(Y_mod[:, i] - H*X_p[:, i] - H*(X_extr[:, i] - X_p[:, i]))
        P[i] ← (identity(4) - K[i]*H)*P_extr[i]
        Y[:, i] ← H*X[:, i]
    return P
get_variance(P) :=
    for i ∈ 0 .. last(P)
        sum[i] ← norme(diag(diag(P[i])))
    return sum
norme(diag(diag(P0))) = 0.141421
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